// COMSOL Multiphysics 5.3.0.260 model "Photoacid_Water v2.mph"
// Outline of the model tree

Parameters
  temp = 298.15 [K]
  maxAbs = 3
  maxExtCoeff = 1e5 [1/(M*cm)]
  scThickness = 10 [nm]
  maxConc = maxAbs/(maxExtCoeff*scThickness)
  vol = scThickness [cm*cm]
  pHo = 8
  pKa = 6
  pKa_ = 14
  cPAt = 0.001 [M]
  cPAHo = cPAt*(1/(1+(10^(pHo-pKa))))
  cPAo = cPAt*(1-(1/(1+(10^(pHo-pKa)))))
  cPAH_o = 0 [mM]
  cPA_o = 0 [mM]
  opticalConcFactor = maxConc/cPAt
  photoCurrentDensity = 45 [mA/cm^2]
  hvPAH = (1-10^-(maxAbs*((opticalConcFactor*cPAHo)/maxConc)))*(photoCurrentDensity/(F_const*scThickness))
  hvPA = (1-10^-(maxAbs*((opticalConcFactor*cPAo)/maxConc)))*(photoCurrentDensity/(F_const*scThickness))
  tauPAH_ = 5 [ns]
  tauPA_ = 5 [ns]
  NernstFactor = (R_const*temp/(log10(exp(1))*F_const))
  EtoGFactor = -log10(exp(1))*F_const
  pKaH2O = 14
  pKaH3O = 0
  pKw = 14
  Kw = 10^-pKw [M^2]
  cH2O = (55.5/55.5) [M]
  cH3Oo = (10^-pHo) [M]
  cOHo = Kw/((10^-pHo) [M])
  kappaFactor = 1e-6
  kvib = kappaFactor*k_B_const*temp/h_const
  kappaDLFactor = 1
  kdiff = kappaDLFactor*1E9 [1/(M*s)]
  kdiffGrotFactor = 10
  EoPAHH2O = -NernstFactor*(pKa-pKaH3O)
  EoPAHOH = -NernstFactor*(pKa-pKaH2O)
  EoPAH_H2O = -NernstFactor*(pKa_-pKaH3O)
  EoPAH_OH = -NernstFactor*(pKa_-pKaH2O)
  KeqPAHH2O = 10^(EoPAHH2O/NernstFactor)
  KeqPAHOH = 10^(EoPAHOH/NernstFactor)
  KeqPAH_H2O = 10^(EoPAH_H2O/NernstFactor)
  KeqPAH_OH = 10^(EoPAH_OH/NernstFactor)
  lambda = -NernstFactor*(pKaH2O-pKaH3O)
  EdagMarcusFactor = 0.5  // scale factor to lamda/4
  EdagPAHH2O = -EdagMarcusFactor*(EoPAHH2O+lambda)^2/(4*lambda)
  EdagPAHOH = -EdagMarcusFactor*(EoPAHOH+lambda)^2/(4*lambda)
  EdagPAH_H2O = -EdagMarcusFactor*(EoPAH_H2O+lambda)^2/(4*lambda)
  EdagPAH_OH = -EdagMarcusFactor*(EoPAH_OH+lambda)^2/(4*lambda)
  dark_t = 1 [s]
  light_t = 1 [s]
  light_period = 900 [s]

Functions
  an1: Analytic | funcname = pulse; expr = (x<dark_t)||(x > dark_t + light_t); periodic = on; periodicupper = light_period; argunit = s; fununit = 1

Variables
  var1 "Variables 1"

Materials
  mat1: Common "Water"
    def "Basic"
      dynamicviscosity = eta(T[1/K])[Pa*s]
      ratioofspecificheat = 1.0
      electricconductivity = 5.5e-6[S/m]
      heatcapacity = Cp(T[1/K])[J/(kg*K)]
      density = rho(T[1/K])[kg/m^3]
      thermalconductivity = k(T[1/K])[W/(m*K)]
      soundspeed = cs(T[1/K])[m/s]
      eta: Piecewise
        arg = T
        pieces = 
          {273.15, 413.15, 1.3799566804-0.021224019151*T^1+1.3604562827E-4*T^2-4.6454090319E-7*T^3+8.9042735735E-10*T^4-9.0790692686E-13*T^5+3.8457331488E-16*T^6}
          {413.15, 553.75, 0.00401235783-2.10746715E-5*T^1+3.85772275E-8*T^2-2.39730284E-11*T^3}
      Cp: Piecewise | arg = T; pieces = {273.15, 553.75, 12010.1471-80.4072879*T^1+0.309866854*T^2-5.38186884E-4*T^3+3.62536437E-7*T^4}
      rho: Piecewise | arg = T; pieces = {273.15, 553.75, 838.466135+1.40050603*T^1-0.0030112376*T^2+3.71822313E-7*T^3}
      k: Piecewise | arg = T; pieces = {273.15, 553.75, -0.869083936+0.00894880345*T^1-1.58366345E-5*T^2+7.97543259E-9*T^3}
      cs: Interpolation | table = {{273, 1403}, {278, 1427}, {283, 1447}, {293, 1481}, {303, 1507}, {313, 1526}, {323, 1541}, {333, 1552}, {343, 1555}, {353, 1555}, {363, 1550}, {373, 1543}}; interp = piecewisecubic

Physics
  re: ReactionEng "Reaction Engineering"
    EquationForm.form = Automatic
    reactor.reactor = batchvol
    energybalance.energybalance = exclude
    energybalance.T = temp
    mixture.mixture = liquid
    Activity.useActivity = 0
    UniformScaling.UniformScaling = 0
    massbalance.Vr = vol
    inits1: SpeciesInitialValue "Initial Values 1" | initialValue = {cH2O, cH3Oo, cOHo, cPAo, cPAHo, cPAH_o, cPA_o}
    rch2: ReactionChem "1: PAH+H2O<=>PA+H3O"
      nf = 1
      Ef = EtoGFactor*EdagPAHH2O
      rType = rev
      useArrhenius = 1
      setKeq0 = 1
      Keq0 = KeqPAHH2O
      formula = PAH+H2O<=>PA+H3O
      kf = kvib*((10^(-(pKa-pKa_H3O))) [1/M])
      Af = kvib/temp [M/K]
    PAH: SpeciesChem "Species: PAH"
      sisDef = 1
      sType = volumetric
      Dependent = 1
      DependentEquilibriumReaction = rch2
      sSequenceNo = 3
      SpeciesSource = Reaction
      specLabel = PAH
      Tlo = 300[K]
      Tmid = 1000[K]
      Thi = 5000[K]
      h = R_const*((re.T<=re.Tlo_PAH)*(re.aLo6_PAH+re.Tlo_PAH*(re.aLo1_PAH+0.5*re.Tlo_PAH*(re.aLo2_PAH+2*re.Tlo_PAH*(re.aLo3_PAH+0.75*re.Tlo_PAH*(re.aLo4_PAH+0.8*re.Tlo_PAH*re.aLo5_PAH))/3)))+(re.T>re.Tlo_PAH)*(re.T<=re.Tmid_PAH)*(re.aLo6_PAH+re.T*(re.aLo1_PAH+0.5*re.T*(re.aLo2_PAH+2*re.T*(re.aLo3_PAH+0.75*re.T*(re.aLo4_PAH+0.8*re.T*re.aLo5_PAH))/3)))+(re.T>re.Tmid_PAH)*(re.T<=re.Thi_PAH)*(re.aHi6_PAH+re.T*(re.aHi1_PAH+0.5*re.T*(re.aHi2_PAH+2*re.T*(re.aHi3_PAH+0.75*re.T*(re.aHi4_PAH+0.8*re.T*re.aHi5_PAH))/3)))+(re.T>re.Thi_PAH)*(re.aHi6_PAH+re.Thi_PAH*(re.aHi1_PAH+0.5*re.Thi_PAH*(re.aHi2_PAH+2*re.Thi_PAH*(re.aHi3_PAH+0.75*re.Thi_PAH*(re.aHi4_PAH+0.8*re.Thi_PAH*re.aHi5_PAH))/3))))
      s = R_const*((re.T<=re.Tlo_PAH)*(re.aLo7_PAH+re.aLo1_PAH*log(re.T/1[K])+re.Tlo_PAH*(re.aLo2_PAH+0.5*re.Tlo_PAH*(re.aLo3_PAH+2*re.Tlo_PAH*(re.aLo4_PAH+0.75*re.Tlo_PAH*re.aLo5_PAH)/3)))+(re.T>re.Tlo_PAH)*(re.T<=re.Tmid_PAH)*(re.aLo7_PAH+re.aLo1_PAH*log(re.T/1[K])+re.T*(re.aLo2_PAH+0.5*re.T*(re.aLo3_PAH+2*re.T*(re.aLo4_PAH+0.75*re.T*re.aLo5_PAH)/3)))+(re.T>re.Tmid_PAH)*(re.T<=re.Thi_PAH)*(re.aHi7_PAH+re.aHi1_PAH*log(re.T/1[K])+re.T*(re.aHi2_PAH+0.5*re.T*(re.aHi3_PAH+2*re.T*(re.aHi4_PAH+0.75*re.T*re.aHi5_PAH)/3)))+(re.T>re.Thi_PAH)*(re.aHi7_PAH+re.aHi1_PAH*log(re.T/1[K])+re.Thi_PAH*(re.aHi2_PAH+0.5*re.Thi_PAH*(re.aHi3_PAH+2*re.Thi_PAH*(re.aHi4_PAH+0.75*re.Thi_PAH*re.aHi5_PAH)/3))))
      Cp = R_const*((re.T<=re.Tlo_PAH)*(re.aLo1_PAH+re.Tlo_PAH*(re.aLo2_PAH+re.Tlo_PAH*(re.aLo3_PAH+re.Tlo_PAH*(re.aLo4_PAH+re.Tlo_PAH*re.aLo5_PAH))))+(re.T>re.Tlo_PAH)*(re.T<=re.Tmid_PAH)*(re.aLo1_PAH+re.T*(re.aLo2_PAH+re.T*(re.aLo3_PAH+re.T*(re.aLo4_PAH+re.T*re.aLo5_PAH))))+(re.T>re.Tmid_PAH)*(re.T<=re.Thi_PAH)*(re.aHi1_PAH+re.T*(re.aHi2_PAH+re.T*(re.aHi3_PAH+re.T*(re.aHi4_PAH+re.T*re.aHi5_PAH))))+(re.T>re.Thi_PAH)*(re.aHi1_PAH+re.Thi_PAH*(re.aHi2_PAH+re.Thi_PAH*(re.aHi3_PAH+re.Thi_PAH*(re.aHi4_PAH+re.Thi_PAH*re.aHi5_PAH)))))
      sigma = 3.458[angstrom]
      epsilonkb = 107.4[K]
      mu = 0[C*m]
      ActivityCoefficient = 1
      speciesEnthalpy = NASA
      ReactionTagInSpecies = {rch1, rch2, rch3}
      updatefeat = 1
      GasThermalConductivitySel = Automatic
      GasDiffusivitySel = Automatic
      LiquidDiffusivitySel = Automatic
      k = 0.02[W/(m*K)]
      De = 1e-5[m^2/s]
      SpeciesrateSelection = Automatic
      specName = PAH
      R = -re.r_1-re.r_2-re.r_3
      Speciesrate = 0[mol/(m^3*s)]
      SpeciesrateSurf = 0[mol/(m^2*s)]
      Speciessurfacerate = 0[mol/(m^2*s)]
      typeGUIControl = volumetric
      mixtureSolvent = 4
      Dgas = 10^-5[m^2/s]
      Dliquid = 10^-8[m^2/s]
      kgas = 0.015[W/(m*K)]
      MolarMassSelection = Thermodynamics
      M = 0.032[kg/mol]
      liquidDensitySel = Thermodynamics
      rho = 1000[kg/m^3]
    H2O: SpeciesChem "Species: H2O" | sType = solvent; cLock = 1
    PA: SpeciesChem "Species: PA" | z = -1
    H3O: SpeciesChem "Species: H3O" | z = +1
    rch3: ReactionChem "2: PAH+OH<=>PA+H2O"
      nf = 1
      Ef = EtoGFactor*EdagPAHOH
      rType = rev
      useArrhenius = 1
      setKeq0 = 1
      Keq0 = KeqPAHOH
      formula = PAH+OH<=>PA+H2O
      kf = kdiff*kGrot*exp(EdPAHOH)
      Af = kdiffGrotFactor*kdiff/temp [1/K]
    OH: SpeciesChem "Species: OH" | z = -1
    rch1: ReactionChem "3: PAH<=>PAH_"
      rType = rev
      setKeq0 = 0
      formula = PAH<=>PAH_
      kf = ((1-10^-(maxAbs*(comp1.re.c_PAH/maxConc)))/(1-10^-(maxAbs*(cPAHo/maxConc))))*(hvPAH/comp1.re.c_PAH)*(1-pulse(t))
      kr = 1/tauPAH_
    PAH_: SpeciesChem "Species: PAH_"
      sisDef = 1
      sType = volumetric
      sSequenceNo = 5
      SpeciesSource = Reaction
      specLabel = PAH_
      Tlo = 300[K]
      Tmid = 1000[K]
      Thi = 5000[K]
      h = R_const*((re.T<=re.Tlo_PAH_)*(re.aLo6_PAH_+re.Tlo_PAH_*(re.aLo1_PAH_+0.5*re.Tlo_PAH_*(re.aLo2_PAH_+2*re.Tlo_PAH_*(re.aLo3_PAH_+0.75*re.Tlo_PAH_*(re.aLo4_PAH_+0.8*re.Tlo_PAH_*re.aLo5_PAH_))/3)))+(re.T>re.Tlo_PAH_)*(re.T<=re.Tmid_PAH_)*(re.aLo6_PAH_+re.T*(re.aLo1_PAH_+0.5*re.T*(re.aLo2_PAH_+2*re.T*(re.aLo3_PAH_+0.75*re.T*(re.aLo4_PAH_+0.8*re.T*re.aLo5_PAH_))/3)))+(re.T>re.Tmid_PAH_)*(re.T<=re.Thi_PAH_)*(re.aHi6_PAH_+re.T*(re.aHi1_PAH_+0.5*re.T*(re.aHi2_PAH_+2*re.T*(re.aHi3_PAH_+0.75*re.T*(re.aHi4_PAH_+0.8*re.T*re.aHi5_PAH_))/3)))+(re.T>re.Thi_PAH_)*(re.aHi6_PAH_+re.Thi_PAH_*(re.aHi1_PAH_+0.5*re.Thi_PAH_*(re.aHi2_PAH_+2*re.Thi_PAH_*(re.aHi3_PAH_+0.75*re.Thi_PAH_*(re.aHi4_PAH_+0.8*re.Thi_PAH_*re.aHi5_PAH_))/3))))
      s = R_const*((re.T<=re.Tlo_PAH_)*(re.aLo7_PAH_+re.aLo1_PAH_*log(re.T/1[K])+re.Tlo_PAH_*(re.aLo2_PAH_+0.5*re.Tlo_PAH_*(re.aLo3_PAH_+2*re.Tlo_PAH_*(re.aLo4_PAH_+0.75*re.Tlo_PAH_*re.aLo5_PAH_)/3)))+(re.T>re.Tlo_PAH_)*(re.T<=re.Tmid_PAH_)*(re.aLo7_PAH_+re.aLo1_PAH_*log(re.T/1[K])+re.T*(re.aLo2_PAH_+0.5*re.T*(re.aLo3_PAH_+2*re.T*(re.aLo4_PAH_+0.75*re.T*re.aLo5_PAH_)/3)))+(re.T>re.Tmid_PAH_)*(re.T<=re.Thi_PAH_)*(re.aHi7_PAH_+re.aHi1_PAH_*log(re.T/1[K])+re.T*(re.aHi2_PAH_+0.5*re.T*(re.aHi3_PAH_+2*re.T*(re.aHi4_PAH_+0.75*re.T*re.aHi5_PAH_)/3)))+(re.T>re.Thi_PAH_)*(re.aHi7_PAH_+re.aHi1_PAH_*log(re.T/1[K])+re.Thi_PAH_*(re.aHi2_PAH_+0.5*re.Thi_PAH_*(re.aHi3_PAH_+2*re.Thi_PAH_*(re.aHi4_PAH_+0.75*re.Thi_PAH_*re.aHi5_PAH_)/3))))
      Cp = R_const*((re.T<=re.Tlo_PAH_)*(re.aLo1_PAH_+re.Tlo_PAH_*(re.aLo2_PAH_+re.Tlo_PAH_*(re.aLo3_PAH_+re.Tlo_PAH_*(re.aLo4_PAH_+re.Tlo_PAH_*re.aLo5_PAH_))))+(re.T>re.Tlo_PAH_)*(re.T<=re.Tmid_PAH_)*(re.aLo1_PAH_+re.T*(re.aLo2_PAH_+re.T*(re.aLo3_PAH_+re.T*(re.aLo4_PAH_+re.T*re.aLo5_PAH_))))+(re.T>re.Tmid_PAH_)*(re.T<=re.Thi_PAH_)*(re.aHi1_PAH_+re.T*(re.aHi2_PAH_+re.T*(re.aHi3_PAH_+re.T*(re.aHi4_PAH_+re.T*re.aHi5_PAH_))))+(re.T>re.Thi_PAH_)*(re.aHi1_PAH_+re.Thi_PAH_*(re.aHi2_PAH_+re.Thi_PAH_*(re.aHi3_PAH_+re.Thi_PAH_*(re.aHi4_PAH_+re.Thi_PAH_*re.aHi5_PAH_)))))
      sigma = 3.458[angstrom]
      epsilonkb = 107.4[K]
      mu = 0[C*m]
      ActivityCoefficient = 1
      speciesEnthalpy = NASA
      ReactionTagInSpecies = {rch1, rch5, rch6}
      updatefeat = 1
      GasThermalConductivitySel = Automatic
      GasDiffusivitySel = Automatic
      LiquidDiffusivitySel = Automatic
      k = 0.02[W/(m*K)]
      De = 1e-5[m^2/s]
      SpeciesrateSelection = Automatic
      specName = PAH_
      R = re.r_1-root.comp1.re.r_6-root.comp1.re.r_7
      Speciesrate = 0[mol/(m^3*s)]
      SpeciesrateSurf = 0[mol/(m^2*s)]
      Speciessurfacerate = 0[mol/(m^2*s)]
      typeGUIControl = volumetric
      mixtureSolvent = 4
      Dgas = 10^-5[m^2/s]
      Dliquid = 10^-8[m^2/s]
      kgas = 0.015[W/(m*K)]
      MolarMassSelection = Thermodynamics
      M = 0.032[kg/mol]
      liquidDensitySel = Thermodynamics
      rho = 1000[kg/m^3]
    rch4: ReactionChem "4: PA<=>PA_"
      rType = rev
      setKeq0 = 0
      formula = PA<=>PA_
      kf = ((1-10^-(maxAbs*(comp1.re.c_PA/maxConc)))/(1-10^-(maxAbs*(cPAo/maxConc))))*(hvPA/comp1.re.c_PA)*(1-pulse(t))
      kr = 1/tauPA_
    PA_: SpeciesChem "Species: PA_" | z = -1
    rch5: ReactionChem "6: PAH_+H2O<=>PA_+H3O"
      nf = 1
      Ef = EtoGFactor*EdagPAH_H2O
      rType = rev
      useArrhenius = 1
      setKeq0 = 1
      Keq0 = KeqPAH_H2O
      formula = PAH_+H2O<=>PA_+H3O
      kf = kvib
      Af = kvib/temp [M/K]
    rch6: ReactionChem "7: PAH_+OH<=>PA_+H2O"
      nf = 1
      Ef = EtoGFactor*EdagPAH_OH
      rType = rev
      useArrhenius = 1
      setKeq0 = 1
      Keq0 = KeqPAH_OH
      formula = PAH_+OH<=>PA_+H2O
      kf = kdiff*kGrot
      Af = kdiffGrotFactor*kdiff/temp [1/K]
    rch7: ReactionChem "8: 2H2O<=>OH+H3O"
      nf = 1
      Ef = F*dGdPAHH2O
      rType = rev
      useArrhenius = 0
      setKeq0 = 1
      Keq0 = Kw [1/M^2]
      formula = 2H2O<=>OH+H3O
      kf = Kw*(kdiff*kdiffGrotFactor^2) [1/M^2]
      Af = kvib*((10^(-(pKa-pKa_H3O))) [1/M])
  ev: Events
    expl1: ExplicitEvent | start = dark_t; period = light_period
    expl2: ExplicitEvent | start = dark_t + light_t; period = light_period

Studies
  std1 "Study 1"
    time: Transient "Time Dependent" | tlist = range(0,.01,3); usertol = on; rtol = .2

Solver configurations
  sol1 "Solution 1" (study std1)
    v1: Variables "Dependent Variables 1"
    t1: Time "Time-Dependent Solver 1"
      tlist = range(0,.01,3)
      rtol = .2
      atolglobalvaluemethod = manual
      atolglobal = 1.0E-6
      tstepsbdf = intermediate
      tout = tsteps
      dDef: Direct
      fc1: FullyCoupled | linsolver = dDef; dtech = auto

Datasets
  dset1: Solution | solution = sol1

Plots
  pg3: PlotGroup1D "qECP Splitting / Voc (re)"
    data = dset1
    xlabel = Time (s)
    ylabel = quasi-electrochemical potential splitting (meV)
    glob1: Global | data = dset1; expr = 59.2 * (pKw-(-log10(comp1.re.c_H3O/1000)-log10(comp1.re.c_OH/1000)))
  pg1: PlotGroup1D "Concentration (re)" | data = dset1; ylabel = Concentration (M)
    glob1: Global
      expr = {comp1.re.c_PAH, comp1.re.c_PA, comp1.re.c_H3O, comp1.re.c_OH, comp1.re.c_PAH_, comp1.re.c_PA_}
      unit = {M, M, M, M, M, M}
      descr = {Concentration, Concentration, Concentration, Concentration, Concentration, Concentration}
      autoexpr = on
  pg2: PlotGroup1D "Rate (re)" | data = dset1
    glob1: Global | expr = {abs(comp1.re.R_H3O), abs(comp1.re.R_OH)}; unit = {M/s, M/s}